x := 0.7
n := 10, 11 .. 15
f(n) := nthroot(e^(n*x)/2 + nthroot(n*x, 3), 3) + sum(nthroot(e^(1.2*k) + (k - 10)/(k + 30), k)/(sqrt(k*nthroot((n + 5), 3)) + ln(sqrt(n*x))), k = 1 .. n)
n = [10; 11; 12; 13; 14; 15]
f(n) = [15.9502; 18.4721; 21.5425; 25.3115; 29.9684; 35.7512]
