y(x, e) :=
    {
        el ← 1
        k ← 1
        s ← 0
    }
    while |el| > e
        el ← x^(3*k + 1)/((4*k - 1)*(4*k - 2))
        s ← s + el
        k ← k + 1
    return s
x := 1.0
y(x, 10^-5) = 0.218632
y(x, 10^-6) = 0.219163
